# NUFEB simulation

atom_style	bio
atom_modify	map array sort 1000 5.0e-7
boundary	ff pp pp
newton		off

processors  4 1 1
comm_modify	vel yes

read_data_bio atom.in
#read_bio_restart restart.data

group HET type 1
group EPS type 2

region bed block 0 1e-4 0 4e-5 0 2e-6 units box
region del block 0 99.5e-6 0.5e-6 39.5e-6 0 INF units box

group bed1 region bed
group del1 region del

group moving subtract all bed1
group deleting subtract all del1

velocity all set 0.0 0.0 0.0

change_box all boundary p p p
change_box all z final 0 4e-05

set type 1 diameter 0.8e-6
set type 2 diameter 0.8e-6
set type 1 mass 2.68083e-16
set type 2 mass 2.68083e-16

neighbor	5e-7 bin
neigh_modify	delay 0 one 5000

##############Define DEM Variables&Commands##############

pair_style  gran/hooke/history 1 NULL 1.e6 NULL 0.0 1
pair_coeff  * *

timestep 1e-8

fix 1 moving nve/sphere

delete_atoms group deleting

variable kanc equal 5e+5

fix fco all cohesive 1e-16 1 1e-8 1e-6 1

variable pfx equal 0.0
variable pfy equal 0.0
variable pfz equal 0.0

fix fd all fdrag 1000

#Defining nufebFoam variables
variable bioSteps equal 0
variable bioDt equal 1
variable nloops equal 1

#variables used in fix kinetics
variable diffT equal 1e-4
variable layer equal -1

#variables used in fix death   from biofilm_het
variable deadDia equal 9e-7


##############Define IBm Commands from biofilm_het ##############

fix k1 all kinetics 100 25 10 25 v_diffT v_layer niter 5000
fix kgm all kinetics/growth/monod epsdens 30
fix g1 all kinetics/diffusion v_tol dcflag 2
fix d1 all divide 100 v_EPSdens v_divDia 64564
fix e1 HET eps_extract 100 v_EPSratio v_EPSdens 53453

##############Define IBm Computes##############

compute myMass all biomass
compute myRough all roughness

#fix k1 all kinetics 100000 25 10 10 v_diffT v_layer niter 1
fix cfd1 all sedifoam v_bioSteps v_bioDt v_nloops

##############Simulation Output##############
#dump du3 all custom/vtk 1000 snapshot%_*.vtu id type diameter x y z

dump            d0 all bio 6800 biomass roughness

thermo_style    custom step cpu atoms
thermo		100
thermo_modify	lost error

#from biofilm_het
run 80000
